**
**   Structure: cantilever beam under pressure.
**   Test objective: C3D10 elements: smoothing of
**                   mesh perturbation
**
*NODE,NSET=NALL
       1,            1.,            0.
       2,            0.,            0.
       3,            1.,            1.
       4,           0.5,            0.
       5,           0.5,           0.5
       6,            1.,           0.5
       7,            0.,            1.
       8,            0.,           0.5
       9,           0.5,            1.
      10,            1.,            0.,            8.
      11,            1.,            1.,            8.
      12,            0.,            0.,            8.
      13,            1.,           0.5,            8.
      14,           0.5,           0.5,            8.
      15,           0.5,            0.,            8.
      16,            0.,            1.,            8.
      17,           0.5,            1.,            8.
      18,            0.,           0.5,            8.
      19,            1.,            0.,            2.
      20,            1.,            0.,            1.
      21,           0.5,            0.,            1.
      22,            0.,            0.,            2.
      23,           0.5,            0.,            2.
      24,            0.,            0.,            1.
      25,            1.,            0.,            4.
      26,            1.,            0.,            3.
      27,           0.5,            0.,            3.
      28,            0.,            0.,            4.
      29,           0.5,            0.,            4.
      30,            0.,            0.,            3.
      31,            1.,            0.,            6.
      32,            1.,            0.,            5.
      33,           0.5,            0.,            5.
      34,            0.,            0.,            6.
      35,           0.5,            0.,            6.
      36,            0.,            0.,            5.
      37,            1.,            0.,            7.
      38,           0.5,            0.,            7.
      39,            0.,            0.,            7.
      40,            0.,            1.,            2.
      41,            0.,           0.5,            1.
      42,            0.,            1.,            1.
      43,            0.,           0.5,            2.
      44,            0.,            1.,            4.
      45,            0.,           0.5,            3.
      46,            0.,            1.,            3.
      47,            0.,           0.5,            4.
      48,            0.,            1.,            6.
      49,            0.,           0.5,            5.
      50,            0.,            1.,            5.
      51,            0.,           0.5,            6.
      52,            0.,           0.5,            7.
      53,            0.,            1.,            7.
      54,            1.,            1.,            2.
      55,           0.5,            1.,            1.
      56,            1.,            1.,            1.
      57,           0.5,            1.,            2.
      58,            1.,            1.,            3.8
      59,           0.5,            1.,            3.
      60,            1.,            1.,            3.
      61,           0.5,            1.,            4.
      62,            1.,            1.,            6.
      63,           0.5,            1.,            5.
      64,            1.,            1.,            5.
      65,           0.5,            1.,            6.
      66,           0.5,            1.,            7.
      67,            1.,            1.,            7.
      68,            1.,           0.5,            1.
      69,            1.,           0.5,            2.
      70,            1.,           0.5,            3.
      71,            1.,           0.5,            4.
      72,            1.,           0.5,            5.
      73,            1.,           0.5,            6.
      74,            1.,           0.5,            7.
     149,      0.499871,      0.499871,       3.99987
     150,           0.5,           0.5,            2.
     151,           0.5,           0.5,            1.
     152,      0.249935,      0.249935,       2.99994
     153,      0.249935,      0.749935,       3.99994
     154,      0.249935,      0.249935,       3.99994
     155,      0.249935,      0.749935,       4.99994
     156,      0.249935,      0.249935,       4.99994
     157,      0.749935,      0.749935,       3.99994
     158,      0.249935,      0.749935,       2.99994
     159,      0.749935,      0.749935,       4.99994
     160,           0.5,           0.5,            7.
     161,           0.5,           0.5,            6.
     162,      0.749935,      0.249935,       2.99994
     163,      0.749935,      0.249935,       3.99994
     164,      0.749935,      0.249935,       4.99994
*ELEMENT, TYPE=C3D10, ELSET=EALL
      37,       2,      22,      19,      40,      24,      23,      21,
      41,      43,     150
      38,       2,       3,      54,       1,       5,      56,     151,
       4,       6,      68
      39,      22,      44,      28,     149,      45,      47,      30,
     152,     153,     154
      40,      28,      34,     149,      48,      36,     156,     154,
      49,      51,     155
      41,      40,       7,      54,       2,      42,      55,      57,
      41,       8,     151
      42,      54,       2,      19,      40,     151,      21,      69,
      57,      41,     150
      43,      40,      44,     149,      58,      46,     153,     158,
      59,      61,     157
      44,      44,      48,     149,      62,      50,     155,     153,
      63,      65,     159
      45,      34,      16,      11,      48,      52,      17,     160,
      51,      53,      66
      46,      11,      62,      31,      34,      67,      73,      74,
     160,     161,      35
      47,      12,      11,      34,      16,      14,     160,      39,
      18,      17,      52
      48,      22,      19,      40,     149,      23,     150,      43,
     152,     162,     158
      49,       7,       3,      54,       2,       9,      56,      55,
       8,       5,     151
      50,      22,      28,      25,     149,      30,      29,      27,
     152,     154,     163
      51,       1,       2,      19,      54,       4,      21,      20,
      68,     151,      69
      52,      58,      19,      40,      54,      70,     150,      59,
      60,      69,      57
      53,      28,      25,     149,      31,      29,     163,     154,
      33,      32,     164
      54,      62,      48,      34,      11,      65,      51,     161,
      67,      66,     160
      55,     149,      48,      34,      62,     155,      51,     156,
     159,      65,     161
      56,      34,      11,      10,      31,     160,      13,      38,
      35,      74,      37
      57,      10,      11,      34,      12,      13,     160,      38,
      15,      14,      39
      58,      58,      25,      62,     149,      71,      72,      64,
     157,     163,     159
      59,      19,      25,      58,     149,      26,      71,      70,
     162,     163,     157
      60,      22,      19,     149,      25,      23,     162,     152,
      27,      26,     163
      61,      25,      62,     149,      31,      72,     159,     163,
      32,      73,     164
      62,      28,      48,     149,      44,      49,     155,     154,
      47,      50,     153
      63,      28,      34,      31,     149,      36,      35,      33,
     154,     156,     164
      64,      34,      62,      31,     149,     161,      73,      35,
     156,     159,     164
      65,      22,     149,      40,      44,     152,     158,      43,
      45,     153,      46
      66,      44,      62,     149,      58,      63,     159,     153,
      61,      64,     157
      67,     149,      58,      19,      40,     157,      70,     162,
     158,      59,     150
** Names based on e1
*ELSET,ELSET=E1
37,
38,
39,
40,
41,
42,
43,
44,
48,
49,
50,
51,
52,
53,
55,
58,
59,
60,
61,
62,
63,
64,
65,
66,
67,
*NSET,NSET=FIX
1,4,2,6,5,8,3,9,7
*NSET,NSET=LOAD
10,15,12,13,14,18,11,17,16
*BOUNDARY
1,1,2
3,1,1
FIX,3,3
*MATERIAL,NAME=EL
*ELASTIC
210000.,.3
*SOLID SECTION,ELSET=EALL,MATERIAL=EL
*STEP
*STATIC
*DLOAD
47,P2,-100.
57,P2,-100.
*NODE FILE
U
*EL FILE
S
*END STEP
